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/BATCH
/COM,ANSYS RELEASE 2023 R2           BUILD 23.2      UP20230531       15:19:19
/input,menust,tmp,''
/GST,ON
/PLO,INFO,3
/GRO,CURL,ON
/CPLANE,1
WPSTYLE,,,,,,,,0
main
/COM,ANSYS RELEASE 2023 R2           BUILD 23.2      UP20230531       15:19:21
/POST1
SET,LAST
PLDISP,1
getStrain
FINISH
! /EXIT,NOSAV
